# Задание1 | Вариант8
x_0 := 4
x_0 := 10
x_1 := 5
x_1 := 12
a := 13.5
x_2 := 6
x_2 := 14
a := 4.5
f(x) := ln(x)^(12/5)
f(x) := ln(x)^(12/11)
L(x) := f(x_0)*(x - x_1)*(x - x_2)/((x_0 - x_1)*(x_0 - x_2)) + f(x_1)*(x - x_0)*(x - x_2)/((x_1 - x_0)*(x_1 - x_2)) + f(x_2)*(x - x_0)*(x - x_1)/((x_0 - x_2)*(x_0 - x_1))
Задание2
L(a) float, 8 → 1.7261124
f(a) float, 8 → 1.560938
Δ := |f(a) - L(a)| float, 8 → 0.16517439
k(x) := d^4/dx^4(f(x))
M := max(k(x_0), k(x_1), k(x_2)) float, 8 → -0.00017187044
R(x) := M/3! float, 8 → -0.000028645073
# [plot: f(x), L(x) vs x]
Задание3
