f(x) := x*log(x) - 1
a := 2.44
b := 2.56
ε := 0.000000000000001
Dixodom :=
    k ← 0
    while |b - a| > ε
        x ← (a + b)/2
        if f(a)*f(x) < 0
            b ← x
        if f(b)*f(x) < 0
            a ← x
        k ← k + 1
    Dixodom ← [x; k]
# [plot: f(x) vs x]
Dixodom = [2.50618; 47]
