f(x) := x*log(x) - 1
f(x) := 3*sin(x) - x + 3
ε := 0.0001
Nuton :=
    k ← 0
    a ← 0
    b ← 3
    while |b - a| > ε
        b ← a
        a ← b - f(b)/f'(b)
        k ← k + 1
    Nuton ← [a; k]
# [plot: f(x) vs x]
Nuton = [3.10619; 12]
