f(x) := x*log(x) - 1
a := 0
b := 3
ε := 0.0001
f(x) := 3*sin(x) - x + 3
Sek :=
    k ← 0
    x0 ← a
    x1 ← b
    while |f(x1)| > ε
        x2 ← x1 - (x1 - x0)*f(x1)/(f(x1) - f(x0))
        x0 ← x1
        x1 ← x2
        k ← k + 1
    Sek ← [x2; k]
# [plot: f(x) vs x]
Sek = [3.10618; 3]
