x_0 := 10
x_1 := 12
a := 13.5
x_2 := 14
f(x) := ln(x)^(12/11)
L(x) := f(x_0)*(x - x_1)*(x - x_2)/((x_0 - x_1)*(x_0 - x_2)) + f(x_1)*(x - x_0)*(x - x_2)/((x_1 - x_0)*(x_1 - x_2)) + f(x_2)*(x - x_0)*(x - x_1)/((x_2 - x_0)*(x_2 - x_1))
L(a) = 2.83967
-приближонное
f(a) = 2.83915
-точное
Δ := |L(a) - f(a)| = 0.000524391
-погрешность
n := 2
M(x) := |d^3/dx^3(f(x))|
U := max(M(x_0), M(x_2))
M(3) = 0.0685952
U = 0.00219595
R(x) := U/(n + 1)!*|(x - x_0)*(x - x_1)*(x - x_2)|
-вид  # сверху
R(a) = 0.000960726
# [plot: f(x), L(x) vs x]
